# Deconvolution of spectrum by three peaks
A := 1
y_0 := 0
x_c := 5
w := 1
s := 1
N := 1000
i := 0 .. N
x[i] := 0 + 10*i/N
y[i] := 0 + 10*i/N
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x =  # no stored result
# Gauss deconvolution:
# Gauss:
y_G(x, y_0, x_c, w, A) := y_0 + A/(w*sqrt(π/2))*e^(-2*(x - x_c)^2/w^2)
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y_L(x, y_0, x_c, w, A) := y_0 + 2*A/π + w/(4*(x - x_c)^2 + w^2)
z_0 := 0
y_c := 5
w_x := 1
w_y := 1
z_L(z_0, x_c, w_x, A, y_c, w_y, x, y) := z_0 + A/((1 + ((x - x_c)/w)^2)*(1 + ((y - y_c)/w)^2))
# [component: inputs z_L(z_0, x_c, w_x, A, y_c, w_y, x, y)]
z_L(z_0, x_c, w_x, A, y_c, w_y, x, y) = 6.97625e-6
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y_GL(x, y_0, x_c, w, A, s) := y_0 + A/e^(0.5*(1 - s)*((x - x_c)^2 + w^2)/w^2) + 1 + s*(x - x_c)^2/w^2
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