# [component: outputs E]
# [component: outputs R]
CTOL := z  # error: This variable is undefined.
n := rows(E)
n = 112
i := 0 .. n - 1
L1 := rows(E) - 1
R1 :=
    for j ∈ 0 .. L1
        I1[j] ← R[j]
    I1
S_E := max(R1)  # - experimental proportionality factor
S_E = 241
Y[i] := R1[i]/S_E
X[i] := E[i]
X[0] = 3.159
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ε(ω) := C_1 - A_1*e^(1i*Φ_1)*(ω - E_1 + 1i*Γ_1)^n_1  # error: This variable is undefined.
d^2/dω^2(ε(ω)) → -A_1*n_1*e^(Φ_1*1i)*(n_1 - 1)*(ω - E_1 + Γ_1*1i)^(n_1 - 2)
n_1 := 0
ε(ω) := C_1 - A_1*e^(1i*Φ_1)*(ω - E_1 + 1i*Γ_1)^n_1  # error: This variable is undefined.
d^2/dω^2(ε(ω)) → 0
n' := 0.5
E_1 := 3.31
E_2 := 3.4
E_3 := 3.57
# [component: outputs A_1]
# [component: outputs Γ_1]
# [component: outputs Φ_1]
# [component: outputs A_2]
# [component: outputs Γ_2]
# [component: outputs Φ_2]
# [component: outputs A_3]
# [component: outputs Γ_3]
# [component: outputs Φ_3]
A_1 := A_1/20
Γ_1 := Γ_1/200
A_2 := A_2/20
Φ_1 := Φ_1/100
Γ_2 := Γ_2/200
A_3 := A_3/20
Φ_2 := Φ_2/100
Γ_3 := Γ_3/200
Φ_3 := Φ_3/100
A_1 = 0.6
Γ_1 = 0.065
Φ_1 = 0.93
A_2 = 0.8
Γ_2 = 0.23
Φ_2 = 0.93
A_3 = 0.35
Γ_3 = 0.09
Φ_3 = 0.89
R_e1(ω) := Re(-A_1*n'*e^(Φ_1*1i)*(n' - 1)*(ω - E_1 + Γ_1*1i)^(n' - 2))
R_e2(ω) := Re(-A_2*n'*e^(Φ_2*1i)*(n' - 1)*(ω - E_2 + Γ_2*1i)^(n' - 2))
R_e3(ω) := Re(-A_3*n'*e^(Φ_3*1i)*(n' - 1)*(ω - E_3 + Γ_3*1i)^(n' - 2))
R_e(ω) := R_e1(ω) + R_e2(ω) + R_e3(ω)
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