# [component: outputs E]
# [component: outputs R]
CTOL := z  # error: Эта переменная не определена.
n := rows(E)
n = 112
i := 0 .. n - 1
L1 := rows(E) - 1
R1 :=
    for j ∈ 0 .. L1
        I1[j] ← R[j]
    I1
S_E := max(R1)  # - experimental proportionality factor
S_E = 241
Y[i] := R1[i]/S_E
X[i] := E[i]
X[0] = 3.159
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n_1 := n_1
ε(ω) := C_1 - A_1*e^(1i*Φ_1)*(ω - E_1 + 1i*Γ_1)^n_1  # error: Эта переменная не определена.
d^3/dω^3(ε(ω)) → -A_1*n_1*e^(Φ_1*1i)*(n_1 - 1)*(n_1 - 2)*(ω - E_1 + Γ_1*1i)^(n_1 - 3)
# The results of the symbolical differentiation of ε(ω) in cases of four turn points have been obtained and are ΔR/R=d^3/dω^3(ε(ω))
# for 1D, n=-1/2 | for 2D, n=0, ln(ω - E_1 + 1i*Γ_1) | for 3D, n=1/2 | for exsitonics, n=-1
15*A_1*e^(Φ_1*1i)/(8*(ω - E_1 + Γ_1*1i)^(7/2))
A_1*e^(Φ_1*1i)/(ω - E_1 + Γ_1*1i)^2
-3*A_1*e^(Φ_1*1i)/(8*(ω - E_1 + Γ_1*1i)^(5/2))
6*A_1*e^(Φ_1*1i)/(ω - E_1 + Γ_1*1i)^4
# amplitude | phase factor | transition energy | broadening
A_1 := 1
Φ_1 := 0.3
E_1 := 3.4
Γ_1 := 0.5
R_1D(ω) := Re(15*A_1*e^(Φ_1*1i)/(8*(ω - E_1 + Γ_1*1i)^(7/2)))
R_3D(ω) := Re(-3*A_1*e^(Φ_1*1i)/(8*(ω - E_1 + Γ_1*1i)^(5/2)))
R_2D(ω) := Re(A_1*e^(Φ_1*1i)/(ω - E_1 + Γ_1*1i)^2)
R_ex(ω) := Re(6*A_1*e^(Φ_1*1i)/(ω - E_1 + Γ_1*1i)^4)
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