CTOL := 10^-22
TOL := CTOL
# Constants:
q := 1.60217653*10^-19*coul  # Charge of electron
eV := q*V
q_e := 1.60217653*10^-19
q := 1
ε_0 = 552635*(eV/(V^2*cm))  # Electric constant
ε_0 := 5.52635*10^5
k_B := 1.3806505*10^-23*joule/K = 8.61734e-5*(eV/K)  # Boltsmans constant
T_K := 300*K
m_e := 9.1093826*10^-31*kg = 5.68563*10^-16*s^2*eV/cm^2  # Mass of electron
m_e := 5.68563*10^-16
c = 29979245800 cm/s  # Speed of light
c := 2.99792*10^10
h := 6.6260693*10^-34*joule*sec = 4.13567e-15 eV
# annotation to a formula above: A listing of fundamental physical constants.
# Planks constants
h_2π := h/(2*π) = 6.58212*10^-16*s*eV
joule = 10000 kg*cm^2/s^2
h_2π := 6.58212*10^-16
x := READPRN("E.txt")
y := READPRN("R.txt")
# The procedure of sorting of the data by x in acseding order.
# Note: it is important to reduce the mistakes in calculations.
data[:, 0] := x
data[:, 1] := y
A := csort(data, 0)
N := rows(data) - 1
E := A[:, 0]
R := A[:, 1]
ω := E
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# Ploting of reflectance spectra versus eV
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R := R/100
N = 122
ω_max := max(ω)
ω_min := min(ω)
ω_max = 19.8594
ω_min = 0.872
# Transformation of reflaction spectrum in phase shifting by Kramers-Kronig relation
θ :=
    h ← (ω_max - ω_min)/N
    for i ∈ 0 .. N
        S ← 0
        for j ∈ 0 .. N
            S ← S + (ln(sqrt(R[j])) - ln(sqrt(R[i])))/(ω[j]^2 - ω[i]^2)
        T[i] ← -ω[i]*2/π*h*(((ln(sqrt(R[0])) - ln(sqrt(R[i])))/(ω_min^2 - ω[i]^2) + (ln(sqrt(R[N])) - ln(sqrt(R[N])))/(ω_max^2 - ω[i]^2))/2 + S)
    T
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a :=
    for i ∈ 0 .. N
        T[i] ← sqrt(R[i])*cos(θ[i])
    T
b :=
    for i ∈ 0 .. N
        T[i] ← sqrt(R[i])*sin(θ[i])
    T
r' :=
    for i ∈ 0 .. N
        T[i] ← sqrt(a[i]^2 + b[i]^2)
    T
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# Calculation of components (real and imiginary) of complex dielectric function
n_L := 1
sqrt(R')*e^(1i*θ') == (n' - n'')/(n' + n'') solve, n'' → (n' - sqrt(R')*n'*e^(θ'*1i))/(sqrt(R')*e^(θ'*1i) + 1)
n' :=
    for i ∈ 0 .. N
        T[i, 0] ← (n_L + sqrt(R[i])*e^(1i*θ[i]))/(n_L - sqrt(R[i])*e^(1i*θ[i]))
        T[i, 1] ← Re(T[i, 0]^2)
        T[i, 2] ← Im(T[i, 0]^2)
        T[i, 3] ← sqrt((sqrt(T[i, 1]^2 + T[i, 2]^2) + T[i, 1])/2)
        T[i, 4] ← sqrt((sqrt(T[i, 1]^2 + T[i, 2]^2) - T[i, 1])/2)
        T[i, 5] ← T[i, 2]/(T[i, 1]^2 + T[i, 2]^2)
    T
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R'' := 1 - 4*n_L*n'[:, 3]/((n_L + n'[:, 3])^2 + n'[:, 4]^2)
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n'' := n'[:, 3]
k'' := n'[:, 4]
k''[2] = 1.38785
n''[2] = 7.85027
n_0 := 1
n := 1
k := 0.1
F(n, k, R) := (R - (1 - 4*n_0*n/((n_0 + n)^2 + k^2)))^2
Given
n ≥ 1
k ≥ 0
z(n, k, R) := Minimize(F, n, k)
z(n, k, R[2]) = [1.00001; 2.49461]
R' :=
    for i ∈ 0 .. N
        F ← 1
        T[i, 0] ← R[i]
        T[i, 1] ← z(n''[i], k''[i], R[i])[0]
        T[i, 2] ← z(n''[i], k''[i], R[i])[1]
        T[i, 3] ← (1 - 4*n_0*T[i, 1]/((n_0 + T[i, 1])^2 + T[i, 2]^2))
    T
n := R'[:, 1]
k := R'[:, 2]
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# Calculation of absorbance spectrum
k := n'[:, 4]
α :=
    for i ∈ 0 .. N
        if k[i] ≥ 0
            T[i, 1] ← 2*k[i]*ω[i]/c
            T[i, 2] ← (T[i, 1]*ω[i]*h_2π)^2
            T[i, 3] ← T[i, 1]^2
    T
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# Optical cinductivity
ε_0 = 552635
h_2π = 6.58212*10^-16
q_e = 1.60218*10^-19
c = 29979200000
σ_r :=
    for i ∈ 0 .. N
        T[i] ← q_e/(4*π)*ε_0*ω[i]*n'[:, 2][i]
    T
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# Optical carrier mobility
q_e = 1.60218*10^-19
μ :=
    for i ∈ 0 .. N - 1
        T[i] ← σ_r[i]/(N''[i]*q_e)
    T  # error: Эта переменная не определена.
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# Calculation of effective dencity of carriers
m_e = 5.68563*10^-16
q_e = 1.60218*10^-19
ε_0 = 552635
q = 1
Sum :=
    h ← (ω_max - ω_min)/N
    for i ∈ 0 .. N - 1
        T[i, 0] ← 2/π*h*((n'[:, 2][i]/(n'[:, 1][i]^2 + n'[:, 2][i]^2)*ω[i] + n'[:, 2][i + 1]/(n'[:, 1][i + 1]^2 + n'[:, 2][i + 1]^2)*ω[i + 1])/2)
        T[i, 2] ← T[i, 0]*m_e*ε_0/(4*π*q^2)
        T[i, 4] ← 1 + 2/π*h*((n'[:, 2][i]*1/ω[i] + n'[:, 2][i + 1]*1/ω[i + 1])/2)
        T[i, 5] ← -h*((n'[:, 2][i]/(n'[:, 1][i]^2 + n'[:, 2][i]^2)*1/ω[i] + n'[:, 2][i + 1]/(n'[:, 1][i + 1]^2 + n'[:, 2][i + 1]^2)*1/ω[i + 1])/2)
    T
ω_2p := Sum[:, 0]
N_ef := Sum[:, 2]
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ε' := Sum[:, 4]
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ε'[2] = 3.01112
# Calculation of third derivatives of components of complex dielectric function.
f :=
    for i ∈ 0 .. N
        T[i] ← n'[:, 1][i]*E[i]^2
    T
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ε'''_r :=
    for d ∈ 0 .. 2
        for i ∈ 0 .. N - 1
            T[i, d] ← (f[i + 1] - f[i])/(E[i + 1] - E[i])
            f[i] ← T[i, d]
            M[i, d] ← 1/E[i]^2*f[i]
    M
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ε'''_r = [
    149.735, 232.567, -596.62;
    135.28, 110.194, -609.675;
    116.252, 18.8699, -1467.45;
    94.4548, -149.022, -25.9242;
    65.7587, -128.605, -4866.24;
    43.9746, -579.625, -1340.85;
    -18.4059, -633.205, -1973.68;
    -50.5092, -695.494, -4002.04;
    -113.164, -1007.01, 26087.5;
    -159.635, 431.736, 330.634
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]
# Results table
# coloms | 0 | 1 | 2 | 3 | 4 | 5 | 6 | 7 | 8
# 9 | 10 | 11 | 12
# E
# square of absorbance,
# (eVcm^-1)^2
# square of absorbance,
# (eVcm^-1)^2
# N.ef/ms, cm^-3
# Loss function
# optical conductivity
# optical carrier mobility
# n | k | Re (ε1) | Im(ε2) | absorbance, cm^-1 | third der Re(e)
data1[:, 10] := n'[:, 5]
data1[:, 11] := σ_r
data1[:, 12] := μ  # error: Эта переменная не определена.
data1[:, 9] := ε'''_r[:, 2]
data1[:, 0] := E
data1[:, 1] := n'[:, 3]
data1[:, 2] := n'[:, 4]
data1[:, 3] := n'[:, 1]
data1[:, 4] := n'[:, 5]
data1[:, 5] := α[:, 1]
data1[:, 6] := α[:, 2]
data1[:, 7] := α[:, 3]
data1[:, 8] := N_ef
data1 =  # no stored result
