λ_1 := 955.72
R_res1 := 2.34
R_res2 := 2.374
λ_2 := 533
λ_3 := 419
R_res3 := 2.41
R_res4 := 2.387
λ_4 := 479.5
Guess
A := 1
B := 1
C := 1
D := 1  # block of first prediction of parameters for resolving
Given
sqrt(1 + A*λ_1^2/(λ_1^2 - B^2) + C*λ_1^2/(λ_1^2 - D^2)) == R_res1
sqrt(1 + A*λ_2^2/(λ_2^2 - B^2) + C*λ_2^2/(λ_2^2 - D^2)) == R_res2
# calculation block of function with variable parameters
sqrt(1 + A*λ_3^2/(λ_3^2 - B^2) + C*λ_3^2/(λ_3^2 - D^2)) == R_res3
sqrt(1 + A*λ_4^2/(λ_4^2 - B^2) + C*λ_4^2/(λ_4^2 - D^2)) == R_res4
[A'; B'; C'; D'] := Find(A, B, C, D)  # calculating process block
[A'; B'; C'; D'] = [0.717462; 216.014; 3.69395; -79.2243]  # results printing
# Block of ploting of function with solved parameters
N := 1000
i := 1 .. N
λ[i] := 300 + 1000*i/N
λ[0] = 0
λ[N - 1] = 1299
n(λ) := sqrt(1 + A'*λ^2/(λ^2 - B'^2) + C'*λ^2/(λ^2 - D'^2))
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C := 2.998*10^8
ω[i] := 0.1 + 5*(i - 1)/(N - 1)
λ[1] = 301
ω_max := max(ω)
ω_min := min(ω)
ω_min = 0
ω_max = 5.1
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data :=
    for i ∈ 0 .. N
        M[i, 0] ← λ[i]
        M[i, 1] ← n(λ[i])
    M
h_2π := 6.58212*10^-16
k(n', ω') :=
    h ← (ω_max - ω_min)/N
    S ← 0
    for i ∈ 0 .. N - 1
        S ← S + (((n(λ[i]) - n')/(ω[i]^2 - ω'^2) + (n(λ[i + 1]) - n')/(ω[i + 1]^2 - ω'^2))/2)
    M ← -2*ω'/π*h*S
data' :=
    for i ∈ 0 .. N - 1
        n' ← n(λ[i])
        ω' ← ω[i]
        M[i] ← k(n', ω')
    M
data'' :=
    for i ∈ 0 .. N - 1
        M[i, 0] ← λ[i]
        M[i, 1] ← n(M[i, 0])
        M[i, 2] ← data'[i]
        M[i, 3] ← 2*ω[i]*M[i, 2]/(C*h_2π)
        M[i, 4] ← 1
    M
# add Mi,4 for calculation of slope
n := data''[:, 1]
k := data''[:, 2]
α := data''[:, 3]
# 0 | 1 | 2 | 3
# λ, nm | n | k | α, cm^-1
E := ω
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α = [
    0; 19430.1; 23038.3; 26706.6; 30429.8; 34203; 38021.7; 41881.7; 45779.1; 49710.3
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]
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data'' = [
    0, 1, 0, 0, 1;
    301, 2.53935, 0.0191709, 19430.1, 1;
    302, 2.53693, 0.0216475, 23038.3, 1;
    303, 2.53457, 0.0239526, 26706.6, 1;
    304, 2.53225, 0.0261043, 30429.8, 1;
    305, 2.52998, 0.0281176, 34203, 1;
    306, 2.52775, 0.0300056, 38021.7, 1;
    307, 2.52557, 0.0317796, 41881.7, 1;
    308, 2.52343, 0.0334494, 45779.1, 1;
    309, 2.52133, 0.0350236, 49710.3, 1
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]
